Fi[1000] := 0
n := 0 .. 1000 - 1
Fi[n] := rnd(2*π)
wmax := 4
Asp := 20.00
Bsp := 4
Sp(w) := Asp*e^(-Bsp/w^4)/w^5
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integral(Sp(w), w = 0 .. 10) = 1.2495
A(Nh, w) := sqrt(2*Sp(w)*wmax/Nh)
Correlation(Data, WndSize) :=
    R ← correl(Data, Data)/length(Data)
    i ← 0, 1 .. WndSize
    for i ∈ 0 .. WndSize - 1
        R[i] ← R[i]*(0.5 + 0.5*cos(π*i/WndSize))
    for i ∈ WndSize .. length(Data)
        R[i] ← 0
    return R
WaveCos(Nh, t, x) := sum(A(Nh, wmax*i/Nh)*cos(wmax*i*t/Nh + x/9.8*A(Nh, wmax*i/Nh)^2 + (1*Fi[i])), i = 1 .. Nh)
WaveSlope(Nh, t, x, dx) := atan((WaveCos(Nh, t, x + dx) - WaveCos(Nh, t, x - dx))/(2*dx))
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Spectrum(w, R, N, dt) :=
    a ← 0
    for i ∈ 0 .. N
        a ← a + R[i]*cos(w*i*dt)*dt*2/π
    return a
N := 1000
dt := 1/6
i := 0 .. N - 1
SlopeData[i] := WaveCos(80, i*dt, 0)
SlopeData[i] := WaveSlope(10, i*dt, 0, 0.01)
SlopeCorr := Correlation(SlopeData, 200)
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